Test plane
0.0
0 0 0.0
0.8 0.5 2.1
-0.3 0.0 0.2
#===============================================================================
SURFACE
Asa_frontal
8 1.0 12 -2.0

YDUPLICATE
0.00

SCALE
0.00 0.00 0.00

TRANSLATE
0.00 0.00 0.00

ANGLE
0.00
#-------------------------------------------------------------------------------
SECTION
-0.92 0.00 0.08 0.50 5.00 0 0

AFILE
"Perfis\S1223 MOD2015.dat"

CLAF
0.993
#-------------------------------------------------------------------------------
SECTION
-0.07 1.02 0.13 0.25 2.00 0 0

AFILE
"Perfis\MIN ponta2016.dat"

CLAF
0.857
#===============================================================================
SURFACE
Asa_traseira
8 1.0 12 -2.0

YDUPLICATE
0.00

SCALE
0.00 0.00 0.00

TRANSLATE
0.00 0.00 0.00

ANGLE
0.00
#-------------------------------------------------------------------------------
SECTION
0.23 0.00 0.43 0.30 2.00 0 0

AFILE
"Perfis\S1223 MOD2015.dat"

CLAF
1.090
#-------------------------------------------------------------------------------
SECTION
-0.07 1.02 0.13 0.25 2.00 0 0

AFILE
"Perfis\MIN ponta2016.dat"

CLAF
0.857
